// SBML level 2 version 4

function goldbeter_koshland(v1, v2, J1, J2)
  2*v1*J2/(v2 - v1 + J1*v2 + J2*v1 + ((v2 - v1 + J1*v2 + J2*v1)^2 - 4*(v2 - v1)*v1*J2)^(1/2));
end

model Tyson2003_Mutual_Activation()
  // This is an SBML implementation the model of mutual activation (figure 1e) described in the article:
  // Sniffers, buzzers, toggles and blinkers: dynamics of regulatory and signaling pathways in the cell.
  // Tyson JJ, Chen KC, Novak B. Curr Opin Cell Biol. 2003 Apr;15(2):221-31. PubmedID:12648679; DOI:10.1016/S0955-0674(03)00017-6;
  // Abstract:
  // The physiological responses of cells to external and internal stimuli are governed by genes and proteins interacting in complex networks whose dynamical properties are impossible to understand by intuitive reasoning alone. Recent advances by theoretical biologists have demonstrated that molecular regulatory networks can be accurately modeled in mathematical terms. These models shed light on the design principles of biological control systems and make predictions that have been verified experimentally.
  // The article has a typo: the expression k2*X*R most likely should be k2*R
  // Originally created by libAntimony v1.4 (using libSBML 3.4.1)
  // This model originates from BioModels Database: A Database of Annotated Published Models (http://www.ebi.ac.uk/biomodels/). It is copyright (c) 2005-2011 The BioModels.net Team.
  // For more information see the terms of use.
  // To cite BioModels Database, please use: Li C, Donizelli M, Rodriguez N, Dharuri H, Endler L, Chelliah V, Li L, He E, Henry A, Stefan MI, Snoep JL, Hucka M, Le Novère N, Laibe C (2010) BioModels Database: An enhanced, curated and annotated resource for published quantitative kinetic models. BMC Syst Biol., 4:92.
  // biomodels.db:MODEL1102100001
  // biomodels.db:BIOMD0000000311
  // isDescribedBy pubmed:12648679
  // isVersionOf GO:0065007 GO:0051098 GO:0050896
  // hasTaxon taxonomy:131567
  // hasProperty mamo:MAMO_0000046

  // Compartments:
  compartment env = 1;  // isVersionOf GO:0005623

  // Species:
  species R in env = 0;  // hasProperty GO:0016301; isVersionOf CHEBI:36080
  species $S in env = 0;
  species $Ep in env;  // hasVersion MOD:00696; isVersionOf kegg.compound:C00562
  species $E in env;  // isVersionOf CHEBI:36080

  // Parameters:
  k0 = 0.4 per_s;
  k1 = 0.01 per_s;
  k2 = 1 per_s;
  k3 = 1 per_s;
  J3 = 0.05 M;
  k4 = 0.2 M_per_s;
  J4 = 0.05 M;
  Et = 1 M;

  // Assignment rules:
  Ep := goldbeter_koshland(k3*R, k4, J3, J4);
  E := Et - Ep;

  // Reactions:
  r1: => R; env*k0*Ep;  // modifiers: Ep; isVersionOf GO:0009058
  r2: => R; env*k1*S;  // modifiers: S; isVersionOf GO:0009058
  r3: R => ; env*k2*R;  // isVersionOf GO:0009056
  r4: $E => $Ep; env*k3*R*E/(J3 + E);  // modifiers: R; isVersionOf GO:0006470
  r5: $Ep => $E; env*k4*Ep/(J4 + Ep);  // isVersionOf GO:0006470

  // Unit definitions:
  unit time = second; time is "s";
  unit substance = mole; substance is "mole";
  unit per_s = 1 / second;
  unit M_per_s = mole / (second * litre);
  unit M = mole / litre;
  unit per_M_per_s = litre / (mole * second);
end
